# OpenSim document version 40000
ForceSet WuShoulder:
  CoordinateActuator [values shared by the 19 below unless stated]: min_control=-inf max_control=inf optimal_force=100
  CoordinateActuator TH_x: coordinate=TH_x
  CoordinateActuator TH_y: coordinate=TH_y
  CoordinateActuator TH_z: coordinate=TH_z
  CoordinateActuator TH_transx: coordinate=TH_transx
  CoordinateActuator TH_transy: coordinate=TH_transy
  CoordinateActuator TH_transz: coordinate=TH_transz
  CoordinateActuator SC_y: coordinate=SC_y
  CoordinateActuator SC_z: coordinate=SC_z
  CoordinateActuator SC_x: coordinate=SC_x
  CoordinateActuator AC_y: coordinate=AC_y
  CoordinateActuator AC_z: coordinate=AC_z
  CoordinateActuator AC_x: coordinate=AC_x
  CoordinateActuator GH_y: coordinate=GH_y
  CoordinateActuator GH_z: coordinate=GH_z
  CoordinateActuator GH_yy: coordinate=GH_yy
  CoordinateActuator EL_x: coordinate=EL_x
  CoordinateActuator PS_y: coordinate=PS_y
  CoordinateActuator wrist_deviation: coordinate=wrist_deviation
  CoordinateActuator wrist_flexion: coordinate=wrist_flexion
