# OpenSim document version 40500
Model DAS3_clav_scap_orig:
  gravity: 0 -9.80665 0
  Ground
  BodySet:
    Body thorax: mass=20 [kg] mass_center=(0 -0.1486 0.0591) inertia=(1.29841 0.55245 1.29841 0 0 0)
        meshes=(ground_ribs.vtp ground_spine.vtp ground_skull.vtp ground_jaw.vtp)
      WrapEllipsoid serr_ant: translation=(0 -0.1486 0.0591) quadrant=all dimensions=(0.147 0.2079 0.0944)
      WrapEllipsoid lat_dorsi_sup: translation=(0 -0.1486 0.0591) quadrant=all dimensions=(0.147 0.2079 0.09)
      WrapEllipsoid lat_dorsi_mid: translation=(0.04 -0.19 0.05) quadrant=all dimensions=(0.1 0.15 0.1)
      WrapEllipsoid lat_dorsi_inf: translation=(0.05 -0.16 0.04) quadrant=all dimensions=(0.106 0.15 0.09)
      WrapEllipsoid thoracic_wall: translation=(0 -0.1521 0.0621) quadrant=all dimensions=(0.1446 0.2117 0.0956)
    Body clavicle_1: mass=0 mass_center=(0 0 0) inertia=(0 0 0 0 0 0)
    Body clavicle_2: mass=0 mass_center=(0 0 0) inertia=(0 0 0 0 0 0)
    Body clavicle_r: mass=0.156 mass_center=(0.0747 -0.0053 0.0009)
        inertia=(6.4e-6 2.63e-5 2.43e-5 -6.7e-6 -9.5e-6 2.9e-6) meshes=rclavicle.vtp
    Body scapula_1: mass=0 mass_center=(0 0 0) inertia=(0 0 0 0 0 0)
    Body scapula_2: mass=0 mass_center=(0 0 0) inertia=(0 0 0 0 0 0)
    Body scapula_r: mass=0.7054 mass_center=(-0.0545 -0.0457 0.0112) inertia=(0.001 0.001 0.001 0 0 0)
        meshes=rscapula.vtp
    Body humerus_1: mass=0 mass_center=(0 0 0) inertia=(0 0 0 0 0 0)
    Body humerus_2: mass=0 mass_center=(0 0 0) inertia=(0 0 0 0 0 0)
    Body humerus_r: mass=2.0519 mass_center=(0.00767448 -0.07942638 -0.00270681) inertia=(0.0132 0.001988 0.0132 0 0 0)
        meshes=rhumerus.vtp
      WrapSphere deltoid: translation=(0.0039 -0.0028 -0.00056) quadrant=all radius=0.0272
      WrapSphere inf_sup_sub: translation=(0 0 0) quadrant=all radius=0.0231
      WrapCylinder infra_cyl: xyz_body_rotation=(1.7137 -0.11777 1.5708) translation=(0.0069341 -0.074837 -0.0032784)
          quadrant=-x radius=0.014 length=0.12
      WrapCylinder ter_min_cyl: xyz_body_rotation=(1.56643 0.00610865 -1.47672) translation=(0.0054 -0.023 -0.0044)
          quadrant=-x radius=0.015 length=0.1
      WrapCylinder ter_lat_pec: xyz_body_rotation=(1.56643 0.00610865 -0.953124) translation=(0.0057 -0.073 -0.0042)
          quadrant=all radius=0.01 length=0.1
      WrapSphere rotcuff: translation=(-0.001702092 0.001840329 -0.001267308) quadrant=all radius=0.0231
    Body ulna_r: mass=0.5464 mass_center=(-0.01996221 -0.05945775 0.0101954)
        inertia=(0.0030585 0.00045325 0.0030585 0 0 0) meshes=rulna.vtp
      WrapCylinder elbow: xyz_body_rotation=(3.141 1.3368 1.5708) translation=(0 0 0) quadrant=-x radius=0.019
          length=0.05
      WrapCylinder elbow_circ: xyz_body_rotation=(0 1.3212 -0.1) translation=(0 0 0) quadrant=+x radius=0.015
          length=0.05
      WrapCylinder elbow_brachialis: xyz_body_rotation=(0 1.3212 -0.1) translation=(-0.01 0 0.01) quadrant=all
          radius=0.017 length=0.08
      WrapCylinder anconeus: xyz_body_rotation=(0 1.3212 0) translation=(0 -0.012 -0.007) quadrant=all radius=0.013
          length=0.05
      WrapCylinder elbow_circ_brd: xyz_body_rotation=(1.5708 1.3212 1.5708) translation=(0.01 0 0) quadrant=-x
          radius=0.017 length=0.05
    Body radius_r: mass=0.5464 mass_center=(-0.00736417 -0.1188632 0.00170825)
        inertia=(0.0030585 0.00045325 0.0030585 0 0 0) meshes=rradius.vtp
      WrapCylinder bic_radius: xyz_body_rotation=(-1.6165 0.18302 1.4708) translation=(-0.004 -0.05 0.012) quadrant=x
          radius=0.012 length=0.14
      WrapCylinder supinator: xyz_body_rotation=(-1.7 0.18302 1.5708) translation=(-0.014601 -0.11871 0.0078651)
          quadrant=all radius=0.009 length=0.2
      WrapCylinder pron_teres: xyz_body_rotation=(-1.6165 0.18302 1.5708) translation=(-0.014601 -0.11871 0.0078651)
          quadrant=-y radius=0.009 length=0.2
    Body hand_r: mass=0.525 mass_center=(0.0125107 -0.1055313 0.00134913) inertia=(0.0006387 0.0001904 0.0006387 0 0 0)
        meshes=r_hand.vtp
  JointSet:
    CustomJoint base: socket_parent_frame=ground_offset socket_child_frame=thorax_offset
      Coordinate TH_x: default_value=0 range=(-0.785398 0.785398) clamped=true
      Coordinate TH_y: default_value=0 range=(-3.14159 3.14159) clamped=true
      Coordinate TH_z: default_value=0 range=(-0.785398 0.785398) clamped=true
      Coordinate TH_transx: default_value=0 range=(-2 2) clamped=true
      Coordinate TH_transy: default_value=0 range=(-2 2) clamped=true
      Coordinate TH_transz: default_value=0 range=(-2 2) clamped=true
      PhysicalOffsetFrame ground_offset: socket_parent=/ground translation=(0 0 0) [meters]
      PhysicalOffsetFrame thorax_offset: socket_parent=/bodyset/thorax translation=(0 0 0)
      SpatialTransform:
        TransformAxis rotation1: coordinates=TH_x axis=(1 0 0) LinearFunction(coefficients=1 0)
        TransformAxis rotation2: coordinates=TH_y axis=(0 1 0) LinearFunction(coefficients=1 0)
        TransformAxis rotation3: coordinates=TH_z axis=(0 0 1) LinearFunction(coefficients=1 0)
        TransformAxis translation1: coordinates=TH_transx axis=(1 0 0) LinearFunction(coefficients=1 0)
        TransformAxis translation2: coordinates=TH_transy axis=(0 1 0) LinearFunction(coefficients=1 0)
        TransformAxis translation3: coordinates=TH_transz axis=(0 0 1) LinearFunction(coefficients=1 0)
    CustomJoint sc1: socket_parent_frame=thorax_offset socket_child_frame=clavicle_1_offset
      Coordinate SC_y: default_value=-0.3802 range=(-1.1345 -0.174533) clamped=true
      PhysicalOffsetFrame thorax_offset: socket_parent=/bodyset/thorax translation=(0.025 0.0068 0.0061)
      PhysicalOffsetFrame clavicle_1_offset: socket_parent=/bodyset/clavicle_1 translation=(0 0 0)
      SpatialTransform: axes_held_at_zero=(rotation2 rotation3 translation1 translation2 translation3)
        TransformAxis rotation1: coordinates=SC_y axis=(0 1 0) LinearFunction(coefficients=1 0)
    CustomJoint sc2: socket_parent_frame=clavicle_1_offset socket_child_frame=clavicle_2_offset
      Coordinate SC_z: default_value=0.11 range=(0.0873 0.5236) clamped=true
      PhysicalOffsetFrame clavicle_1_offset: socket_parent=/bodyset/clavicle_1 translation=(0 0 0)
      PhysicalOffsetFrame clavicle_2_offset: socket_parent=/bodyset/clavicle_2 translation=(0 0 0)
      SpatialTransform: axes_held_at_zero=(rotation1 rotation3 translation1 translation2 translation3)
        TransformAxis rotation2: coordinates=SC_z axis=(0 0 1) LinearFunction(coefficients=1 0)
    CustomJoint sc3: socket_parent_frame=clavicle_2_offset socket_child_frame=clavicle_r_offset
      Coordinate SC_x: default_value=0 range=(-0.001 0.873) clamped=true
      PhysicalOffsetFrame clavicle_2_offset: socket_parent=/bodyset/clavicle_2 translation=(0 0 0)
      PhysicalOffsetFrame clavicle_r_offset: socket_parent=/bodyset/clavicle_r translation=(0 0 0)
      SpatialTransform: axes_held_at_zero=(rotation1 rotation2 translation1 translation2 translation3)
        TransformAxis rotation3: coordinates=SC_x axis=(1 0 0) LinearFunction(coefficients=1 0)
    CustomJoint ac1: socket_parent_frame=clavicle_r_offset socket_child_frame=scapula_1_offset
      Coordinate AC_y: default_value=0.808 range=(0.5759587 1.204277) clamped=true
      PhysicalOffsetFrame clavicle_r_offset: socket_parent=/bodyset/clavicle_r translation=(0.1575 0 0)
      PhysicalOffsetFrame scapula_1_offset: socket_parent=/bodyset/scapula_1 translation=(0 0 0)
      SpatialTransform: axes_held_at_zero=(rotation2 rotation3 translation1 translation2 translation3)
        TransformAxis rotation1: coordinates=AC_y axis=(0 1 0) LinearFunction(coefficients=1 0)
    CustomJoint ac2: socket_parent_frame=scapula_1_offset socket_child_frame=scapula_2_offset
      Coordinate AC_z: default_value=0.0855 range=(-0.3839724 0.3490659) clamped=true
      PhysicalOffsetFrame scapula_1_offset: socket_parent=/bodyset/scapula_1 translation=(0 0 0)
      PhysicalOffsetFrame scapula_2_offset: socket_parent=/bodyset/scapula_2 translation=(0 0 0)
      SpatialTransform: axes_held_at_zero=(rotation1 rotation3 translation1 translation2 translation3)
        TransformAxis rotation2: coordinates=AC_z axis=(0 0 1) LinearFunction(coefficients=1 0)
    CustomJoint ac3: socket_parent_frame=scapula_2_offset socket_child_frame=scapula_r_offset
      Coordinate AC_x: default_value=-0.0206 range=(-0.296706 0.3141593) clamped=true
      PhysicalOffsetFrame scapula_2_offset: socket_parent=/bodyset/scapula_2 translation=(0 0 0)
      PhysicalOffsetFrame scapula_r_offset: socket_parent=/bodyset/scapula_r translation=(0 0 0)
      SpatialTransform: axes_held_at_zero=(rotation1 rotation2 translation1 translation2 translation3)
        TransformAxis rotation3: coordinates=AC_x axis=(1 0 0) LinearFunction(coefficients=1 0)
    CustomJoint gh1: socket_parent_frame=scapula_r_offset socket_child_frame=humerus_1_offset
      Coordinate GH_y: default_value=0 range=(-1.571 1.571) clamped=true
      PhysicalOffsetFrame scapula_r_offset: socket_parent=/bodyset/scapula_r translation=(0.0005 -0.0458 -0.008)
      PhysicalOffsetFrame humerus_1_offset: socket_parent=/bodyset/humerus_1 translation=(0 0 0)
      SpatialTransform: axes_held_at_zero=(rotation1 rotation3 translation1 translation2 translation3)
        TransformAxis rotation2: coordinates=GH_y axis=(0 1 0) LinearFunction(coefficients=1 0)
    CustomJoint gh2: socket_parent_frame=humerus_1_offset socket_child_frame=humerus_2_offset
      Coordinate GH_z: default_value=0 range=(-0.5236 1.571) clamped=true
      PhysicalOffsetFrame humerus_1_offset: socket_parent=/bodyset/humerus_1 translation=(0 0 0)
      PhysicalOffsetFrame humerus_2_offset: socket_parent=/bodyset/humerus_2 translation=(0 0 0)
      SpatialTransform: axes_held_at_zero=(rotation1 rotation2 translation1 translation2 translation3)
        TransformAxis rotation3: coordinates=GH_z axis=(0 0 1) LinearFunction(coefficients=1 0)
    CustomJoint gh3: socket_parent_frame=humerus_2_offset socket_child_frame=humerus_r_offset
      Coordinate GH_yy: default_value=0 range=(-1.271 1.058) clamped=true
      PhysicalOffsetFrame humerus_2_offset: socket_parent=/bodyset/humerus_2 translation=(0 0 0)
      PhysicalOffsetFrame humerus_r_offset: socket_parent=/bodyset/humerus_r translation=(0 0 0)
      SpatialTransform: axes_held_at_zero=(rotation1 rotation3 translation1 translation2 translation3)
        TransformAxis rotation2: coordinates=GH_yy axis=(0 1 0) LinearFunction(coefficients=1 0)
    CustomJoint hu: socket_parent_frame=humerus_r_offset socket_child_frame=ulna_r_offset
      Coordinate EL_x: default_value=0.5235988 range=(0.01745329 2.792527) clamped=true
      PhysicalOffsetFrame humerus_r_offset: socket_parent=/bodyset/humerus_r translation=(0.0058 -0.2907 0.0049)
          orientation=(0 0 0.32318) [radians]
      PhysicalOffsetFrame ulna_r_offset: socket_parent=/bodyset/ulna_r translation=(0 0 0)
      SpatialTransform: axes_held_at_zero=(rotation2 rotation3 translation1 translation2 translation3)
        TransformAxis rotation1: coordinates=EL_x axis=(0.969 -0.247 0) LinearFunction(coefficients=1 0)
    CustomJoint ur: socket_parent_frame=ulna_r_offset socket_child_frame=radius_r_offset
      Coordinate PS_y: default_value=1.570796 range=(0.08726646 2.793) clamped=true
      PhysicalOffsetFrame ulna_r_offset: socket_parent=/bodyset/ulna_r translation=(0.0067234 -0.00931306 -0.0068107)
      PhysicalOffsetFrame radius_r_offset: socket_parent=/bodyset/radius_r translation=(0 0 0)
      SpatialTransform: axes_held_at_zero=(rotation2 rotation3 translation1 translation2 translation3)
        TransformAxis rotation1: coordinates=PS_y axis=(0.182 0.98227 -0.044946) LinearFunction(coefficients=1 0)
    CustomJoint rc: socket_parent_frame=radius_r_offset socket_child_frame=hand_r_offset
      Coordinate wrist_deviation: default_value=0 range=(-0.5235988 0.5235988) clamped=true
      Coordinate wrist_flexion: default_value=0 range=(-1.22173 1.22173) clamped=true
      PhysicalOffsetFrame radius_r_offset: socket_parent=/bodyset/radius_r translation=(-0.0333 -0.2342 0.0092)
      PhysicalOffsetFrame hand_r_offset: socket_parent=/bodyset/hand_r translation=(0 0 0)
      SpatialTransform: axes_held_at_zero=(rotation2 translation1 translation2 translation3)
        TransformAxis rotation1: coordinates=wrist_deviation axis=(0 0 -1) LinearFunction(coefficients=1 0)
        TransformAxis rotation3: coordinates=wrist_flexion axis=(1 0 0) LinearFunction(coefficients=1 0)
  MarkerSet:
    Marker IJ: thorax (0 0 0)
    Marker C7: thorax (0 0.0541 0.1242)
    Marker T8: thorax (0.0098 -0.1715 0.1561)
    Marker PX: thorax (-0.0098 -0.1327 -0.0319)
    Marker SC: clavicle_r (7e-7 4.24e-5 3.039e-5)
    Marker AC: scapula_r (1.962e-5 4.49e-5 -3.23e-5)
    Marker AI: scapula_r (-0.116629 -0.140236 0.0359)
    Marker AIprojection: scapula_r (-0.1272 -0.1451 0.0084)
    Marker TS: scapula_r (-0.121876 -0.0228 0.0359)
    Marker TSprojection: scapula_r (-0.1289 -0.0456 0.0013)
    Marker AA: scapula_r (-0.0015 -0.0228 0.0359)
    Marker GH: humerus_r (0 0 0)
    Marker EL: humerus_r (0.0339536 -0.28656 0)
    Marker EM: humerus_r (-0.0339459 -0.291567 0)
    Marker US: ulna_r (-0.0377 -0.2535 -0.0057)
    Marker RS: radius_r (-0.0063 -0.2389 0.0091)
    Marker Wrist: hand_r (0 0 0)
    Marker Capitulum: humerus_r (0.01408345 -0.2831598 -0.002369946)
    Marker CLAV: clavicle_r (0.0571 0.0051 -0.0031)
    Marker SCAP1: scapula_r (-0.0715 -0.0029 0.0309)
    Marker SCAP2: scapula_r (-0.0715 -0.0329 0.0309)
    Marker SCAP3: scapula_r (-0.0415 -0.0328 0.0309)
    Marker SCAP4: scapula_r (0.0085 0.0072 0.0159)
    Marker HUM1: humerus_r (0.0134777 -0.120285 0.0225342)
    Marker HUM2: humerus_r (0.0134777 -0.147985 0.0225342)
    Marker HUM3: humerus_r (-0.0275223 -0.120285 0.0225342)
    Marker HUM4: humerus_r (-0.0275223 -0.147985 0.0225342)
    Marker FORE1: radius_r (0.0107215 -0.0930313 0.0302085)
    Marker FORE2: radius_r (0.0107215 -0.120131 0.0302085)
    Marker FORE3: radius_r (-0.0372785 -0.0930313 0.0302085)
    Marker FORE4: radius_r (-0.0372785 -0.120131 0.0302085)
    Marker MCP1: hand_r (0.07 -0.04 -0.004)
    Marker MCP3: hand_r (0.025 -0.085 0.001)
    Marker MCP5: hand_r (-0.015 -0.075 -0.005)
    Marker OLC: ulna_r (-0.00959082 0.0111396 0.01290426)
    Marker Centelbow: humerus_r (9.101526e-8 -0.2889763 -1.591591e-6)
    Marker Glenoid: scapula_r (-0.02228833 -0.04312386 -0.0045104)
