# OpenSim document version 40000
Model DAS3_clav_scap_orig:
  gravity: 0 -9.80665 0
  Ground
  BodySet:
    Body thorax: mass=20 [kg] mass_center=(0 -0.1486 0.0591) inertia=(1.29841 0.55245 1.29841 0 0 0)
        meshes=(ground_ribs.vtp ground_spine.vtp ground_skull.vtp ground_jaw.vtp)
      WrapEllipsoid serr_ant: translation=(0 -0.1486 0.0591) quadrant=all dimensions=(0.147 0.2079 0.0944)
      WrapEllipsoid lat_dorsi_sup: translation=(0 -0.1486 0.0591) quadrant=all dimensions=(0.147 0.2079 0.09)
      WrapEllipsoid lat_dorsi_mid: translation=(0.04 -0.19 0.05) quadrant=all dimensions=(0.1 0.15 0.1)
      WrapEllipsoid lat_dorsi_inf: translation=(0.05 -0.16 0.04) quadrant=all dimensions=(0.106 0.15 0.09)
      WrapEllipsoid thoracic_wall: translation=(0 -0.1521 0.0621) quadrant=all dimensions=(0.1446 0.2117 0.0956)
    Body clavicle_1: mass=0 mass_center=(0 0 0) inertia=(0 0 0 0 0 0)
    Body clavicle_2: mass=0 mass_center=(0 0 0) inertia=(0 0 0 0 0 0)
    Body clavicle_r: mass=0.156 mass_center=(0.0747 -0.0053 0.0009)
        inertia=(6.4e-6 2.63e-5 2.43e-5 -6.7e-6 -9.5e-6 2.9e-6) meshes=rclavicle.vtp
    Body scapula_1: mass=0 mass_center=(0 0 0) inertia=(0 0 0 0 0 0)
    Body scapula_2: mass=0 mass_center=(0 0 0) inertia=(0 0 0 0 0 0)
    Body scapula_r: mass=0.7054 mass_center=(-0.0545 -0.0457 0.0112) inertia=(0.001 0.001 0.001 0 0 0)
        meshes=rscapula.vtp
    Body humerus_1: mass=0 mass_center=(0 0 0) inertia=(0 0 0 0 0 0)
    Body humerus_2: mass=0 mass_center=(0 0 0) inertia=(0 0 0 0 0 0)
    Body humerus_r: mass=2.0519 mass_center=(0.00767448 -0.07942638 -0.00270681) inertia=(0.0132 0.001988 0.0132 0 0 0)
        meshes=rhumerus.vtp
      WrapSphere deltoid: translation=(0.0039 -0.0028 -0.00056) quadrant=all radius=0.0272
      WrapSphere inf_sup_sub: translation=(0 0 0) quadrant=all radius=0.0231
      WrapCylinder infra_cyl: xyz_body_rotation=(1.7137 -0.11777 1.5708) translation=(0.0069341 -0.074837 -0.0032784)
          quadrant=-x radius=0.014 length=0.12
      WrapCylinder ter_min_cyl: xyz_body_rotation=(1.56643 0.00610865 -1.47672) translation=(0.0054 -0.023 -0.0044)
          quadrant=-x radius=0.015 length=0.1
      WrapCylinder ter_lat_pec: xyz_body_rotation=(1.56643 0.00610865 -0.953124) translation=(0.0057 -0.073 -0.0042)
          quadrant=all radius=0.01 length=0.1
      WrapSphere rotcuff: translation=(-0.001702092 0.001840329 -0.001267308) quadrant=all radius=0.0231
    Body ulna_r: mass=0.5464 mass_center=(-0.01996221 -0.05945775 0.0101954)
        inertia=(0.0030585 0.00045325 0.0030585 0 0 0) meshes=rulna.vtp
      WrapCylinder elbow: xyz_body_rotation=(3.141 1.3368 1.5708) translation=(0 0 0) quadrant=-x radius=0.019
          length=0.05
      WrapCylinder elbow_circ: xyz_body_rotation=(0 1.3212 -0.1) translation=(0 0 0) quadrant=+x radius=0.015
          length=0.05
      WrapCylinder elbow_brachialis: xyz_body_rotation=(0 1.3212 -0.1) translation=(-0.01 0 0.01) quadrant=all
          radius=0.017 length=0.08
      WrapCylinder anconeus: xyz_body_rotation=(0 1.3212 0) translation=(0 -0.012 -0.007) quadrant=all radius=0.013
          length=0.05
      WrapCylinder elbow_circ_brd: xyz_body_rotation=(1.5708 1.3212 1.5708) translation=(0.01 0 0) quadrant=-x
          radius=0.017 length=0.05
    Body radius_r: mass=0.5464 mass_center=(-0.00736417 -0.1188632 0.00170825)
        inertia=(0.0030585 0.00045325 0.0030585 0 0 0) meshes=rradius.vtp
      WrapCylinder bic_radius: xyz_body_rotation=(-1.6165 0.18302 1.4708) translation=(-0.004 -0.05 0.012) quadrant=x
          radius=0.012 length=0.14
      WrapCylinder supinator: xyz_body_rotation=(-1.7 0.18302 1.5708) translation=(-0.014601 -0.11871 0.0078651)
          quadrant=all radius=0.009 length=0.2
      WrapCylinder pron_teres: xyz_body_rotation=(-1.6165 0.18302 1.5708) translation=(-0.014601 -0.11871 0.0078651)
          quadrant=-y radius=0.009 length=0.2
    Body hand_r: mass=0.525 mass_center=(0.0125107 -0.1055313 0.00134913) inertia=(0.0006387 0.0001904 0.0006387 0 0 0)
        meshes=r_hand.vtp
  JointSet:
    CustomJoint base: socket_parent_frame=ground_offset socket_child_frame=thorax_offset
      Coordinate TH_x: default_value=0 range=(-0.785398 0.785398) clamped=true
      Coordinate TH_y: default_value=0 range=(-3.14159 3.14159) clamped=true
      Coordinate TH_z: default_value=0 range=(-0.785398 0.785398) clamped=true
      Coordinate TH_transx: default_value=0 range=(-2 2) clamped=true
      Coordinate TH_transy: default_value=0 range=(-2 2) clamped=true
      Coordinate TH_transz: default_value=0 range=(-2 2) clamped=true
      PhysicalOffsetFrame ground_offset: socket_parent=/ground translation=(0 0 0) [meters]
      PhysicalOffsetFrame thorax_offset: socket_parent=/bodyset/thorax translation=(0 0 0)
      SpatialTransform:
        TransformAxis rotation1: coordinates=TH_x axis=(1 0 0) LinearFunction(coefficients=1 0)
        TransformAxis rotation2: coordinates=TH_y axis=(0 1 0) LinearFunction(coefficients=1 0)
        TransformAxis rotation3: coordinates=TH_z axis=(0 0 1) LinearFunction(coefficients=1 0)
        TransformAxis translation1: coordinates=TH_transx axis=(1 0 0) LinearFunction(coefficients=1 0)
        TransformAxis translation2: coordinates=TH_transy axis=(0 1 0) LinearFunction(coefficients=1 0)
        TransformAxis translation3: coordinates=TH_transz axis=(0 0 1) LinearFunction(coefficients=1 0)
    CustomJoint sc1: socket_parent_frame=thorax_offset socket_child_frame=clavicle_1_offset
      Coordinate SC_y: default_value=-0.3802 range=(-1.1345 -0.174533) clamped=true
      PhysicalOffsetFrame thorax_offset: socket_parent=/bodyset/thorax translation=(0.025 0.0068 0.0061)
      PhysicalOffsetFrame clavicle_1_offset: socket_parent=/bodyset/clavicle_1 translation=(0 0 0)
      SpatialTransform: axes_held_at_zero=(rotation2 rotation3 translation1 translation2 translation3)
        TransformAxis rotation1: coordinates=SC_y axis=(0 1 0) LinearFunction(coefficients=1 0)
    CustomJoint sc2: socket_parent_frame=clavicle_1_offset socket_child_frame=clavicle_2_offset
      Coordinate SC_z: default_value=0.11 range=(0.0873 0.5236) clamped=true
      PhysicalOffsetFrame clavicle_1_offset: socket_parent=/bodyset/clavicle_1 translation=(0 0 0)
      PhysicalOffsetFrame clavicle_2_offset: socket_parent=/bodyset/clavicle_2 translation=(0 0 0)
      SpatialTransform: axes_held_at_zero=(rotation1 rotation3 translation1 translation2 translation3)
        TransformAxis rotation2: coordinates=SC_z axis=(0 0 1) LinearFunction(coefficients=1 0)
    CustomJoint sc3: socket_parent_frame=clavicle_2_offset socket_child_frame=clavicle_r_offset
      Coordinate SC_x: default_value=0 range=(-0.001 0.873) clamped=true
      PhysicalOffsetFrame clavicle_2_offset: socket_parent=/bodyset/clavicle_2 translation=(0 0 0)
      PhysicalOffsetFrame clavicle_r_offset: socket_parent=/bodyset/clavicle_r translation=(0 0 0)
      SpatialTransform: axes_held_at_zero=(rotation1 rotation2 translation1 translation2 translation3)
        TransformAxis rotation3: coordinates=SC_x axis=(1 0 0) LinearFunction(coefficients=1 0)
    CustomJoint ac1: socket_parent_frame=clavicle_r_offset socket_child_frame=scapula_1_offset
      Coordinate AC_y: default_value=0.808 range=(0.5759587 1.204277) clamped=true
      PhysicalOffsetFrame clavicle_r_offset: socket_parent=/bodyset/clavicle_r translation=(0.1575 0 0)
      PhysicalOffsetFrame scapula_1_offset: socket_parent=/bodyset/scapula_1 translation=(0 0 0)
      SpatialTransform: axes_held_at_zero=(rotation2 rotation3 translation1 translation2 translation3)
        TransformAxis rotation1: coordinates=AC_y axis=(0 1 0) LinearFunction(coefficients=1 0)
    CustomJoint ac2: socket_parent_frame=scapula_1_offset socket_child_frame=scapula_2_offset
      Coordinate AC_z: default_value=0.0855 range=(-0.3839724 0.3490659) clamped=true
      PhysicalOffsetFrame scapula_1_offset: socket_parent=/bodyset/scapula_1 translation=(0 0 0)
      PhysicalOffsetFrame scapula_2_offset: socket_parent=/bodyset/scapula_2 translation=(0 0 0)
      SpatialTransform: axes_held_at_zero=(rotation1 rotation3 translation1 translation2 translation3)
        TransformAxis rotation2: coordinates=AC_z axis=(0 0 1) LinearFunction(coefficients=1 0)
    CustomJoint ac3: socket_parent_frame=scapula_2_offset socket_child_frame=scapula_r_offset
      Coordinate AC_x: default_value=-0.0206 range=(-0.296706 0.3141593) clamped=true
      PhysicalOffsetFrame scapula_2_offset: socket_parent=/bodyset/scapula_2 translation=(0 0 0)
      PhysicalOffsetFrame scapula_r_offset: socket_parent=/bodyset/scapula_r translation=(0 0 0)
      SpatialTransform: axes_held_at_zero=(rotation1 rotation2 translation1 translation2 translation3)
        TransformAxis rotation3: coordinates=AC_x axis=(1 0 0) LinearFunction(coefficients=1 0)
    CustomJoint gh1: socket_parent_frame=scapula_r_offset socket_child_frame=humerus_1_offset
      Coordinate GH_y: default_value=0 range=(-1.571 1.571) clamped=true
      PhysicalOffsetFrame scapula_r_offset: socket_parent=/bodyset/scapula_r translation=(0.0005 -0.0458 -0.008)
      PhysicalOffsetFrame humerus_1_offset: socket_parent=/bodyset/humerus_1 translation=(0 0 0)
      SpatialTransform: axes_held_at_zero=(rotation1 rotation3 translation1 translation2 translation3)
        TransformAxis rotation2: coordinates=GH_y axis=(0 1 0) LinearFunction(coefficients=1 0)
    CustomJoint gh2: socket_parent_frame=humerus_1_offset socket_child_frame=humerus_2_offset
      Coordinate GH_z: default_value=0 range=(-0.5236 1.571) clamped=true
      PhysicalOffsetFrame humerus_1_offset: socket_parent=/bodyset/humerus_1 translation=(0 0 0)
      PhysicalOffsetFrame humerus_2_offset: socket_parent=/bodyset/humerus_2 translation=(0 0 0)
      SpatialTransform: axes_held_at_zero=(rotation1 rotation2 translation1 translation2 translation3)
        TransformAxis rotation3: coordinates=GH_z axis=(0 0 1) LinearFunction(coefficients=1 0)
    CustomJoint gh3: socket_parent_frame=humerus_2_offset socket_child_frame=humerus_r_offset
      Coordinate GH_yy: default_value=0 range=(-1.271 1.058) clamped=true
      PhysicalOffsetFrame humerus_2_offset: socket_parent=/bodyset/humerus_2 translation=(0 0 0)
      PhysicalOffsetFrame humerus_r_offset: socket_parent=/bodyset/humerus_r translation=(0 0 0)
      SpatialTransform: axes_held_at_zero=(rotation1 rotation3 translation1 translation2 translation3)
        TransformAxis rotation2: coordinates=GH_yy axis=(0 1 0) LinearFunction(coefficients=1 0)
    CustomJoint hu: socket_parent_frame=humerus_r_offset socket_child_frame=ulna_r_offset
      Coordinate EL_x: default_value=0.5235988 range=(0.01745329 2.792527) clamped=true
      PhysicalOffsetFrame humerus_r_offset: socket_parent=/bodyset/humerus_r translation=(0.0058 -0.2907 0.0049)
          orientation=(0 0 0.32318) [radians]
      PhysicalOffsetFrame ulna_r_offset: socket_parent=/bodyset/ulna_r translation=(0 0 0)
      SpatialTransform: axes_held_at_zero=(rotation2 rotation3 translation1 translation2 translation3)
        TransformAxis rotation1: coordinates=EL_x axis=(0.969 -0.247 0) LinearFunction(coefficients=1 0)
    CustomJoint ur: socket_parent_frame=ulna_r_offset socket_child_frame=radius_r_offset
      Coordinate PS_y: default_value=1.570796 range=(0.08726646 2.793) clamped=true
      PhysicalOffsetFrame ulna_r_offset: socket_parent=/bodyset/ulna_r translation=(0.0067234 -0.00931306 -0.0068107)
      PhysicalOffsetFrame radius_r_offset: socket_parent=/bodyset/radius_r translation=(0 0 0)
      SpatialTransform: axes_held_at_zero=(rotation2 rotation3 translation1 translation2 translation3)
        TransformAxis rotation1: coordinates=PS_y axis=(0.182 0.98227 -0.044946) LinearFunction(coefficients=1 0)
    CustomJoint rc: socket_parent_frame=radius_r_offset socket_child_frame=hand_r_offset
      Coordinate wrist_deviation: default_value=0 range=(-0.5235988 0.5235988) clamped=true
      Coordinate wrist_flexion: default_value=0 range=(-1.22173 1.22173) clamped=true
      PhysicalOffsetFrame radius_r_offset: socket_parent=/bodyset/radius_r translation=(-0.0333 -0.2342 0.0092)
      PhysicalOffsetFrame hand_r_offset: socket_parent=/bodyset/hand_r translation=(0 0 0)
      SpatialTransform: axes_held_at_zero=(rotation2 translation1 translation2 translation3)
        TransformAxis rotation1: coordinates=wrist_deviation axis=(0 0 -1) LinearFunction(coefficients=1 0)
        TransformAxis rotation3: coordinates=wrist_flexion axis=(1 0 0) LinearFunction(coefficients=1 0)
  ForceSet:
    Thelen2003Muscle conoid_lig: appliesForce=false max_isometric_force=0 optimal_fiber_length=0.019
        tendon_slack_length=0.01 pennation_angle_at_optimal=0 [radians]
      PathPoint P1: clavicle_r (0.1124 -0.002 0.0179)
      PathPoint P2: scapula_r (-0.04583776 -0.01512468 -0.022)
    Thelen2003Muscle trap_scap_S: max_isometric_force=745 optimal_fiber_length=0.107 tendon_slack_length=0.054
        pennation_angle_at_optimal=0
      PathPoint trap_scap_3-P1: thorax (-0.0043 0.0425 0.1178)
      PathPoint trap_scap_3-P2: scapula_r (-0.05747 -0.00993 0.03477)
    Thelen2003Muscle trap_scap_M: max_isometric_force=336 optimal_fiber_length=0.0868 tendon_slack_length=0.036
        pennation_angle_at_optimal=0
      PathPoint trap_scap_7-P1: thorax (-0.0016 -0.0339 0.1469)
      PathPoint trap_scap_7-P2: scapula_r (-0.07757 -0.00915 0.02916)
    Thelen2003Muscle trap_scap_I: max_isometric_force=296 optimal_fiber_length=0.1264 tendon_slack_length=0.07
        pennation_angle_at_optimal=0
      PathPoint trap_scap10-P1: thorax (0.0102 -0.1479 0.154)
      PathPoint trap_scap10-P2: scapula_r (-0.09056 -0.01813 0.03416)
    Thelen2003Muscle trap_clav: max_isometric_force=144 optimal_fiber_length=0.1547 tendon_slack_length=0.01
        pennation_angle_at_optimal=0
      PathPoint trap_clav_1-P1: thorax (-0.0097 0.1294 0.1124)
      PathPoint trap_clav_1-P2: clavicle_r (0.11001 0.00489 0.00878)
    Thelen2003Muscle lev_scap: max_isometric_force=200 optimal_fiber_length=0.1578 tendon_slack_length=0.019
        pennation_angle_at_optimal=0
      PathPoint lev_scap_1-P1: thorax (0.0388 0.1479 0.0572)
      PathPoint lev_scap_1-P2: scapula_r (-0.11716 -0.01038 0.02243)
    Thelen2003Muscle pect_min: max_isometric_force=307 optimal_fiber_length=0.1086 tendon_slack_length=0.041
        pennation_angle_at_optimal=0
      PathPoint pect_min_2-P1: thorax (0.0585 -0.0933 -0.0267)
      PathPoint pect_min_2-P2: scapula_r (-0.03015 -0.02017 -0.04411)
    Thelen2003Muscle rhomboid_S: max_isometric_force=285 optimal_fiber_length=0.1077 tendon_slack_length=0.066
        pennation_angle_at_optimal=0
      PathPoint rhomboid_2-P1: thorax (-0.0076 0.0506 0.1151)
      PathPoint rhomboid_2-P2: scapula_r (-0.12766 -0.09804 0.03009)
    Thelen2003Muscle rhomboid_I: max_isometric_force=149 optimal_fiber_length=0.1267 tendon_slack_length=0.031
        pennation_angle_at_optimal=0
      PathPoint rhomboid_4-P1: thorax (-0.0028 0.0068 0.1348)
      PathPoint rhomboid_4-P2: scapula_r (-0.12853 -0.11549 0.03087)
    Thelen2003Muscle serr_ant_I: max_isometric_force=386 optimal_fiber_length=0.1667 tendon_slack_length=0.009
        pennation_angle_at_optimal=0
      PathPoint serr_ant_2-P1: scapula_r (-0.1247 -0.13275 0.04108)
      PathPoint serr_ant_2-P2: thorax (0.1327 -0.1884 0.0149)
      PathWrap: wrap_object=serr_ant method=hybrid
    Thelen2003Muscle serr_ant_M: max_isometric_force=284 optimal_fiber_length=0.122 tendon_slack_length=0.01
        pennation_angle_at_optimal=0
      PathPoint serr_ant_6-P1: scapula_r (-0.116 -0.11715 0.0381)
      PathPoint serr_ant_6-P2: thorax (0.1124 -0.0428 0.0199)
      PathWrap: wrap_object=serr_ant method=hybrid
    Thelen2003Muscle serr_ant_S: max_isometric_force=277 optimal_fiber_length=0.066 tendon_slack_length=0.005
        pennation_angle_at_optimal=0
      PathPoint serr_ant10-P1: scapula_r (-0.10814 0.00035 0.00988)
      PathPoint serr_ant10-P2: thorax (0.0944 0.0109 0.0595)
      PathWrap: wrap_object=serr_ant method=hybrid
    Thelen2003Muscle delt_scap_P: max_isometric_force=946 optimal_fiber_length=0.0949 tendon_slack_length=0.076
        pennation_angle_at_optimal=0.08726646
      PathPoint delt_scap_2-P1: scapula_r (-0.05149 -0.01653 0.03703)
      PathPoint delt_scap_2-P2: humerus_r (0.01667409 -0.09842213 0.006107057)
      PathWrap: wrap_object=deltoid
    Thelen2003Muscle delt_scap_M: max_isometric_force=1856 optimal_fiber_length=0.0748 tendon_slack_length=0.064
        pennation_angle_at_optimal=0.08726646
      PathPoint delt_scap10-P1: scapula_r (0.01621 -0.01772 0.00279)
      PathPoint delt_scap10-P2: humerus_r (0.01936469 -0.1078579 -0.005265685)
      PathWrap: wrap_object=deltoid
    Thelen2003Muscle delt_clav_A: max_isometric_force=505 optimal_fiber_length=0.094 tendon_slack_length=0.078
        pennation_angle_at_optimal=0.08726646
      PathPoint delt_clav_2-P1: clavicle_r (0.10552 0.00378 0.00168)
      PathPoint delt_clav_2-P2: humerus_r (0.01634698 -0.1207257 -0.01086175)
      PathWrap: wrap_object=deltoid
    Thelen2003Muscle coracobr: max_isometric_force=463 optimal_fiber_length=0.0683 tendon_slack_length=0.104
        pennation_angle_at_optimal=0
      PathPoint coracobr_2-P1: scapula_r (-0.01502 -0.03774 -0.04267)
      PathPoint coracobr_2-P2: humerus_r (-0.006920414 -0.1666526 -0.001227595)
    Thelen2003Muscle infra_I: max_isometric_force=741 optimal_fiber_length=0.0719 tendon_slack_length=0.107
        pennation_angle_at_optimal=0
      PathPoint infra_2-P1: scapula_r (-0.12756 -0.11506 0.03705)
      PathPoint infra_2-P2: humerus_r (0.02013655 0.01400112 0.008233704)
      PathWrap: wrap_object=rotcuff
    Thelen2003Muscle infra_S: max_isometric_force=691 optimal_fiber_length=0.0693 tendon_slack_length=0.071
        pennation_angle_at_optimal=0
      PathPoint infra_4-P1: scapula_r (-0.11061 -0.07226 0.03468)
      PathPoint infra_4-P2: humerus_r (0.017855 0.017134 0.0083783)
      PathWrap: wrap_object=rotcuff
    Thelen2003Muscle ter_min: max_isometric_force=497 optimal_fiber_length=0.055 tendon_slack_length=0.051
        pennation_angle_at_optimal=0
      PathPoint ter_min_2-P1: scapula_r (-0.06735 -0.09188 0.02943)
      PathPoint ter_min_2-P2: humerus_r (0.02976524 -0.003300501 0.009244057)
      PathWrap: wrap_object=rotcuff
    Thelen2003Muscle ter_maj: max_isometric_force=608 optimal_fiber_length=0.1526 tendon_slack_length=0.015
        pennation_angle_at_optimal=0
      PathPoint ter_maj_3-P1: scapula_r (-0.09273 -0.11287 0.03599)
      PathPoint ter_maj_3-P2: humerus_r (-0.002573729 -0.08017556 -0.008076187)
      PathWrap: wrap_object=ter_lat_pec
    Thelen2003Muscle supra_P: max_isometric_force=233 optimal_fiber_length=0.0541 tendon_slack_length=0.017
        pennation_angle_at_optimal=0
      PathPoint supra_1-P1: scapula_r (-0.06182 -0.01956 0.01731)
      PathPoint supra_1-P2: humerus_r (0.02496487 0.01055144 0.003976856)
      PathWrap: wrap_object=rotcuff
    Thelen2003Muscle supra_A: max_isometric_force=388 optimal_fiber_length=0.0564 tendon_slack_length=0.052
        pennation_angle_at_optimal=0
      PathPoint supra_3-P1: scapula_r (-0.09589 -0.00176 0.01089)
      PathPoint supra_3-P2: humerus_r (0.01408912 0.01735804 -0.01237972)
      PathWrap: wrap_object=rotcuff
    Thelen2003Muscle subscap_S: max_isometric_force=386 optimal_fiber_length=0.0649 tendon_slack_length=0.044
        pennation_angle_at_optimal=0
      PathPoint subscap_2-P1: scapula_r (-0.08521 -0.01082 0.00785)
      PathPoint subscap_2-P2: humerus_r (-0.0181326 0.0119056 -0.009673595)
      PathPoint subscap_2-P3: humerus_r (0.001239797 0.01117866 -0.02032307)
      PathWrap: wrap_object=rotcuff
    Thelen2003Muscle subscap_M: max_isometric_force=537 optimal_fiber_length=0.0797 tendon_slack_length=0.066
        pennation_angle_at_optimal=0
      PathPoint subscap_5-P1: scapula_r (-0.08894 -0.07985 0.02366)
      PathPoint subscap_5-P2: humerus_r (0.006073052 0.006793195 -0.02328405)
      PathWrap: wrap_object=rotcuff
    Thelen2003Muscle subscap_I: max_isometric_force=508 optimal_fiber_length=0.0721 tendon_slack_length=0.059
        pennation_angle_at_optimal=0
      PathPoint subscap_9-P1: scapula_r (-0.08125 -0.1149 0.02361)
      PathPoint subscap_9-P2: humerus_r (-0.004908824 -0.005457882 -0.02206479)
      PathWrap: wrap_object=rotcuff
    Thelen2003Muscle bic_l: max_isometric_force=347 optimal_fiber_length=0.1292 tendon_slack_length=0.2335
        pennation_angle_at_optimal=0
      PathPoint P1: scapula_r (-0.01551 -0.02529 -0.00698)
      PathPoint P2: humerus_r (0.004 0.014 -0.018)
      PathPoint P3: radius_r (-0.00839294 -0.03628803 -0.006171551)
      PathWrap: wrap_object=inf_sup_sub range=(-1 2)
      PathWrap pathwrap_0: wrap_object=elbow_circ range=(2 -1)
      PathWrap pathwrap_1: wrap_object=bic_radius range=(2 -1)
    Thelen2003Muscle bic_b: max_isometric_force=495 optimal_fiber_length=0.117 tendon_slack_length=0.1913
        pennation_angle_at_optimal=0
      PathPoint bic_b_1-P1: scapula_r (-0.01065 -0.03113 -0.04654)
      PathPoint bic_b_1-P2: radius_r (-0.00839294 -0.03628803 -0.006171551)
      PathWrap: wrap_object=elbow_circ
      PathWrap pathwrap_0: wrap_object=bic_radius
    Thelen2003Muscle tric_long: max_isometric_force=1129 optimal_fiber_length=0.0881 tendon_slack_length=0.2193
        pennation_angle_at_optimal=0.1745329
      PathPoint tric_long_2-P1: scapula_r (-0.02575 -0.06473 -0.00154)
      PathPoint tric_long_2-P2: ulna_r (-0.002 0.019 0.016)
      PathPoint tric_long_2-P3: ulna_r (-0.01038 -0.013975 0.0097588)
      PathWrap: wrap_object=elbow
    Thelen2003Muscle lat_dorsi_S: max_isometric_force=144 optimal_fiber_length=0.2857 tendon_slack_length=0.041
        pennation_angle_at_optimal=0
      PathPoint lat_dorsi_2-P1: thorax (0.013 -0.1967 0.1482)
      PathPoint lat_dorsi_2-P2: humerus_r (0.003553176 -0.04626486 -0.01617808)
      PathWrap: wrap_object=lat_dorsi_sup method=hybrid
      PathWrap pathwrap_0: wrap_object=ter_lat_pec
    Thelen2003Muscle lat_dorsi_M: max_isometric_force=225 optimal_fiber_length=0.3206 tendon_slack_length=0.06
        pennation_angle_at_optimal=0
      PathPoint lat_dorsi_4-P1: thorax (0.0211 -0.3109 0.128)
      PathPoint lat_dorsi_4-P2: humerus_r (0.002841798 -0.03967885 -0.0165487)
      PathWrap: wrap_object=lat_dorsi_mid method=hybrid
      PathWrap pathwrap_0: wrap_object=ter_lat_pec
    Thelen2003Muscle lat_dorsi_I: max_isometric_force=193 optimal_fiber_length=0.3402 tendon_slack_length=0.034
        pennation_angle_at_optimal=0
      PathPoint lat_dorsi_6-P1: thorax (0.1042 -0.2978 0.0851)
      PathPoint lat_dorsi_6-P2: humerus_r (0.003553176 -0.04626486 -0.01617808)
      PathWrap: wrap_object=lat_dorsi_inf method=hybrid
      PathWrap pathwrap_0: wrap_object=ter_lat_pec
    Thelen2003Muscle pect_maj_t_I: max_isometric_force=565 optimal_fiber_length=0.1853 tendon_slack_length=0.053
        pennation_angle_at_optimal=0
      PathPoint pect_maj_t_3-P1: thorax (0.0084 -0.1223 -0.0348)
      PathPoint pect_maj_t_3-P2: humerus_r (0.01203052 -0.07564714 -0.01582085)
      PathWrap: wrap_object=ter_lat_pec
    Thelen2003Muscle pect_maj_t_M: max_isometric_force=331 optimal_fiber_length=0.15 tendon_slack_length=0.026
        pennation_angle_at_optimal=0
      PathPoint pect_maj_t_5-P1: thorax (0.0071 -0.0418 -0.019)
      PathPoint pect_maj_t_5-P2: humerus_r (0.01248559 -0.05602378 -0.01706413)
      PathWrap: wrap_object=ter_lat_pec
    Thelen2003Muscle pect_maj_c_S: max_isometric_force=292 optimal_fiber_length=0.1091 tendon_slack_length=0.014
        pennation_angle_at_optimal=0
      PathPoint pect_maj_c_2-P1: clavicle_r (0.05916 -0.00891 -0.01826)
      PathPoint pect_maj_c_2-P2: humerus_r (0.01248559 -0.05602378 -0.01706413)
      PathWrap: wrap_object=ter_lat_pec
    Thelen2003Muscle tric_med: max_isometric_force=1077 optimal_fiber_length=0.0746 tendon_slack_length=0.0404
        pennation_angle_at_optimal=0.1396263
      PathPoint tric_med_4-P1: humerus_r (0.003158816 -0.2018315 0.01652363)
      PathPoint tric_med_4-P2: ulna_r (-0.01594043 0.002946094 0.02447958)
      PathWrap: wrap_object=elbow
    Thelen2003Muscle brachialis: max_isometric_force=1039 optimal_fiber_length=0.0758 tendon_slack_length=0.0317
        pennation_angle_at_optimal=0
      PathPoint brachialis_4-P1: humerus_r (0.0003870354 -0.192629 -0.0006249142)
      PathPoint brachialis_4-P2: ulna_r (-0.02838114 -0.0343679 0.004403852)
      PathWrap: wrap_object=elbow_brachialis
    Thelen2003Muscle brachiorad: max_isometric_force=164 optimal_fiber_length=0.1613 tendon_slack_length=0.108
        pennation_angle_at_optimal=0
      PathPoint brachiorad_2-P1: humerus_r (0.004874851 -0.219448 0.01561509)
      PathPoint brachiorad_2-P2: radius_r (-0.007103543 -0.2290766 0.008163361)
      PathWrap: wrap_object=elbow_circ_brd method=hybrid
    Thelen2003Muscle pron_teres_H: max_isometric_force=510 optimal_fiber_length=0.061 tendon_slack_length=0.08
        pennation_angle_at_optimal=0
      PathPoint pron_teres_1-P1: humerus_r (-0.03762672 -0.2785186 0.006396974)
      PathPoint pron_teres_1-P2: radius_r (0.0050278 -0.1055 0.020677)
      PathWrap: wrap_object=pron_teres
    Thelen2003Muscle pron_teres_U: max_isometric_force=141 optimal_fiber_length=0.0391 tendon_slack_length=0.0384
        pennation_angle_at_optimal=0
      PathPoint pron_teres_2-P1: ulna_r (-0.02014736 -0.02208468 -0.01005695)
      PathPoint pron_teres_2-P2: radius_r (0.009968538 -0.0829705 0.01337845)
      PathWrap: wrap_object=pron_teres
    Thelen2003Muscle supinator: max_isometric_force=838 optimal_fiber_length=0.0252 tendon_slack_length=0.005
        pennation_angle_at_optimal=0
      PathPoint supinator_3-P1: ulna_r (0.003100317 -0.05479816 0.002778698)
      PathPoint supinator_3-P2: radius_r (0.009278468 -0.05793736 0.01133807)
      PathWrap: wrap_object=supinator
    Thelen2003Muscle pron_quad: max_isometric_force=470 optimal_fiber_length=0.027 tendon_slack_length=0.001
        pennation_angle_at_optimal=0
      PathPoint pron_quad_2-P1: radius_r (-0.01561383 -0.2125592 0.00873324)
      PathPoint pron_quad_2-P2: ulna_r (-0.034552 -0.208019 -0.003017)
    Thelen2003Muscle tric_lat: max_isometric_force=1144 optimal_fiber_length=0.0638 tendon_slack_length=0.157
        pennation_angle_at_optimal=0.1745329
      PathPoint tric_lat_4-P1: humerus_r (0.01324363 -0.09709494 0.01131407)
      PathPoint tric_lat_4-P2: ulna_r (-0.004400255 0.006174741 0.01955409)
      PathWrap: wrap_object=elbow
    Thelen2003Muscle anconeus: max_isometric_force=362 optimal_fiber_length=0.0202 tendon_slack_length=0.008
        pennation_angle_at_optimal=0.2617994
      PathPoint anconeus_2-P1: humerus_r (0.01148056 -0.2981105 0.01143469)
      PathPoint anconeus_2-P2: ulna_r (0.0002247257 -0.02257252 0.0144222)
      PathWrap: wrap_object=anconeus
    ObjectGroup trapezoid
    ObjectGroup costoclav
    ObjectGroup sternoclav
    ObjectGroup glenohum
    ObjectGroup trap_scap
    ObjectGroup trap_clav
    ObjectGroup lev_scap
    ObjectGroup pect_min
    ObjectGroup rhomboid
    ObjectGroup serr_ant
    ObjectGroup delt_scap
    ObjectGroup delt_clav
    ObjectGroup coracobr
    ObjectGroup infra
    ObjectGroup ter_min
    ObjectGroup ter_maj
    ObjectGroup supra
    ObjectGroup subscap
    ObjectGroup bic_c_l: members=bic_l
    ObjectGroup bic_c_b
    ObjectGroup triceps
    ObjectGroup lat_dorsi
    ObjectGroup pect_maj_t
    ObjectGroup pect_maj_c
    ObjectGroup tric_med
    ObjectGroup brachialis
    ObjectGroup brachiorad
    ObjectGroup pron_teres_hr
    ObjectGroup pron_teres_ur
    ObjectGroup supinator_ur
    ObjectGroup pron_quad
    ObjectGroup tric_lat
    ObjectGroup anconeus
  MarkerSet:
    Marker IJ: thorax (0 0 0)
    Marker C7: thorax (0 0.0541 0.1242)
    Marker T8: thorax (0.0098 -0.1715 0.1561)
    Marker PX: thorax (-0.0098 -0.1327 -0.0319)
    Marker SC: clavicle_r (7e-7 4.24e-5 3.039e-5)
    Marker AC: scapula_r (1.962e-5 4.49e-5 -3.23e-5)
    Marker AI: scapula_r (-0.116629 -0.140236 0.0359)
    Marker AIprojection: scapula_r (-0.1272 -0.1451 0.0084)
    Marker TS: scapula_r (-0.121876 -0.0228 0.0359)
    Marker TSprojection: scapula_r (-0.1289 -0.0456 0.0013)
    Marker AA: scapula_r (-0.0015 -0.0228 0.0359)
    Marker GH: humerus_r (0 0 0)
    Marker EL: humerus_r (0.0339536 -0.28656 0)
    Marker EM: humerus_r (-0.0339459 -0.291567 0)
    Marker US: ulna_r (-0.0377 -0.2535 -0.0057)
    Marker RS: radius_r (-0.0063 -0.2389 0.0091)
    Marker Wrist: hand_r (0 0 0)
    Marker Capitulum: humerus_r (0.01408345 -0.2831598 -0.002369946)
    Marker CLAV: clavicle_r (0.0571 0.0051 -0.0031)
    Marker SCAP1: scapula_r (-0.0715 -0.0029 0.0309)
    Marker SCAP2: scapula_r (-0.0715 -0.0329 0.0309)
    Marker SCAP3: scapula_r (-0.0415 -0.0328 0.0309)
    Marker SCAP4: scapula_r (0.0085 0.0072 0.0159)
    Marker HUM1: humerus_r (0.0134777 -0.120285 0.0225342)
    Marker HUM2: humerus_r (0.0134777 -0.147985 0.0225342)
    Marker HUM3: humerus_r (-0.0275223 -0.120285 0.0225342)
    Marker HUM4: humerus_r (-0.0275223 -0.147985 0.0225342)
    Marker FORE1: radius_r (0.0107215 -0.0930313 0.0302085)
    Marker FORE2: radius_r (0.0107215 -0.120131 0.0302085)
    Marker FORE3: radius_r (-0.0372785 -0.0930313 0.0302085)
    Marker FORE4: radius_r (-0.0372785 -0.120131 0.0302085)
    Marker MCP1: hand_r (0.07 -0.04 -0.004)
    Marker MCP3: hand_r (0.025 -0.085 0.001)
    Marker MCP5: hand_r (-0.015 -0.075 -0.005)
    Marker OLC: ulna_r (-0.00959082 0.0111396 0.01290426)
    Marker Centelbow: humerus_r (9.101526e-8 -0.2889763 -1.591591e-6)
    Marker Glenoid: scapula_r (-0.02228833 -0.04312386 -0.0045104)
